Sr := 100
R(Br) := abs(log((Br + 1)/abs(Sr + 1)))*((Br + 1)^(1/1.7))
R(0) = 2.00432
100^(1/1.7) = 15.0131
Rd(D) := (D/10)^(-1/2)
Rd(23) = 0.65938
r := R(1000) + Rd(23) = 58.6382
ceil(r) = 59
# [plot: R(Br) vs Br]
